<?xml version="1.0" encoding="UTF-8"?>
<neuroml xmlns="http://www.neuroml.org/schema/neuroml2" xmlns:xsi="http://www.w3.org/2001/XMLSchema-instance" xsi:schemaLocation="http://www.neuroml.org/schema/neuroml2  https://raw.githubusercontent.com/NeuroML/NeuroML2/development/Schemas/NeuroML2/NeuroML_v2beta4.xsd" id="network_t3">

    <notes>

Network structure (NeuroML 2beta4) for project: t3 saved with neuroConstruct v1.7.1 on: 19:48:05, 22-Oct-15

Cell Group: CG_C04_RS_sm contains 20 cells
Cell Group: CG_C04_AxAx_sm contains 10 cells
Cell Group: CG_C04_Bask_sm contains 10 cells
Cell Group: CG_C04_LTS_sm contains 10 cells
Cell Group: CG_C04_FRB_sm contains 6 cells

Network connection: RS_RS_gap_sm contains 24 individual synaptic connections
Network connection: AxAx_AxAx_gap_sm contains 20 individual synaptic connections
Network connection: LTS_AxAx_sm contains 200 individual synaptic connections
Network connection: Bask_FRB_sm contains 120 individual synaptic connections
Network connection: Bask_Bask_gap_sm contains 20 individual synaptic connections
Network connection: Bask_Bask_sm contains 200 individual synaptic connections
Network connection: Bask_RS_sm contains 400 individual synaptic connections
Network connection: LTS_RS_sm contains 1200 individual synaptic connections
Network connection: LTS_LTS_gap_sm contains 20 individual synaptic connections
Network connection: Bask_AxAx_sm contains 200 individual synaptic connections
Network connection: FRB_LTS_sm contains 100 individual synaptic connections
Network connection: AxAx_FRB_sm contains 120 individual synaptic connections
Network connection: RS_Bask_sm contains 900 individual synaptic connections
Network connection: FRB_RS_gap_sm contains 7 individual synaptic connections
Network connection: RS_AxAx_sm contains 900 individual synaptic connections
Network connection: FRB_Bask_sm contains 100 individual synaptic connections
Network connection: LTS_Pyr_sm contains 360 individual synaptic connections
Network connection: RS_LTS_sm contains 900 individual synaptic connections
Network connection: LTS_LTS_sm contains 200 individual synaptic connections
Network connection: Bask_LTS_sm contains 200 individual synaptic connections
Network connection: FRB_FRB_sm contains 30 individual synaptic connections
Network connection: RS_FRB_gap_sm contains 1 individual synaptic connections
Network connection: FRB_RS_sm contains 100 individual synaptic connections
Network connection: AxAx_RS_sm contains 400 individual synaptic connections
Network connection: LTS_Bask_sm contains 200 individual synaptic connections
Network connection: FRB_AxAx_sm contains 100 individual synaptic connections
Network connection: RS_FRB_sm contains 270 individual synaptic connections
Network connection: RS_RS_sm contains 900 individual synaptic connections

    </notes>

    <include href="cal.channel.nml"/>
    <include href="cat.channel.nml"/>
    <include href="cat_a.channel.nml"/>
    <include href="Exc_Pyr_Int.synapse.nml"/>
    <include href="Exc_Pyr_Pyr.synapse.nml"/>
    <include href="GapJuncCML.nml"/>
    <include href="GapJuncFS.nml"/>
    <include href="GapJuncLTS.nml"/>
    <include href="Inh_Axo_Pyr.synapse.nml"/>
    <include href="Inh_Bask_FS.synapse.nml"/>
    <include href="Inh_Bask_LTS.synapse.nml"/>
    <include href="Inh_Bask_Pyr.synapse.nml"/>
    <include href="Inh_LTS_FS.synapse.nml"/>
    <include href="Inh_LTS_LTS.synapse.nml"/>
    <include href="Inh_LTS_Pyr.synapse.nml"/>
    <include href="k2.channel.nml"/>
    <include href="ka.channel.nml"/>
    <include href="kahp.channel.nml"/>
    <include href="kahp_slower.channel.nml"/>
    <include href="kc.channel.nml"/>
    <include href="kc_fast.channel.nml"/>
    <include href="kdr.channel.nml"/>
    <include href="kdr_fs.channel.nml"/>
    <include href="km.channel.nml"/>
    <include href="L23PyrFRB_varInit.cell.nml"/>
    <include href="L23PyrRS.cell.nml"/>
    <include href="naf.channel.nml"/>
    <include href="naf2.channel.nml"/>
    <include href="naf2__a0__b0__c0__d0__fastNa_shiftmin2_5.channel.nml"/>
    <include href="naf__a0__b0__c0__d0__fastNa_shiftmin3_5.channel.nml"/>
    <include href="nap.channel.nml"/>
    <include href="pas.channel.nml"/>
    <include href="SupAxAx.cell.nml"/>
    <include href="SupBasket.cell.nml"/>
    <include href="SupLTSInter.cell.nml"/>
    <pulseGenerator id="Input_3" delay="0.0s" duration="100.0s" amplitude="1.0E-11A"/>

    <pulseGenerator id="Input_3__0" delay="0.0s" duration="100.0s" amplitude="1.89715E-11A"/>

    <pulseGenerator id="Input_3__1" delay="0.0s" duration="100.0s" amplitude="1.732592E-11A"/>

    <pulseGenerator id="Input_3__2" delay="0.0s" duration="100.0s" amplitude="1.185098E-11A"/>

    <pulseGenerator id="Input_3__3" delay="0.0s" duration="100.0s" amplitude="1.155002E-11A"/>

    <pulseGenerator id="Input_3__4" delay="0.0s" duration="100.0s" amplitude="6.980645E-12A"/>

    <pulseGenerator id="Input_3__5" delay="0.0s" duration="100.0s" amplitude="9.713289E-12A"/>

    <pulseGenerator id="Input_3__6" delay="0.0s" duration="100.0s" amplitude="1.66393E-11A"/>

    <pulseGenerator id="Input_3__7" delay="0.0s" duration="100.0s" amplitude="8.33514E-12A"/>

    <pulseGenerator id="Input_3__8" delay="0.0s" duration="100.0s" amplitude="2.18681E-12A"/>

    <pulseGenerator id="Input_3__9" delay="0.0s" duration="100.0s" amplitude="6.817003E-12A"/>

    <pulseGenerator id="Input_13" delay="0.0s" duration="100.0s" amplitude="1.0E-11A"/>

    <pulseGenerator id="Input_13__0" delay="0.0s" duration="100.0s" amplitude="1.840806E-11A"/>

    <pulseGenerator id="Input_13__1" delay="0.0s" duration="100.0s" amplitude="1.28095E-11A"/>

    <pulseGenerator id="Input_13__2" delay="0.0s" duration="100.0s" amplitude="3.683121E-12A"/>

    <pulseGenerator id="Input_13__3" delay="0.0s" duration="100.0s" amplitude="7.447703E-12A"/>

    <pulseGenerator id="Input_13__4" delay="0.0s" duration="100.0s" amplitude="2.795827E-12A"/>

    <pulseGenerator id="Input_13__5" delay="0.0s" duration="100.0s" amplitude="3.476677E-12A"/>

    <pulseGenerator id="Input_13__6" delay="0.0s" duration="100.0s" amplitude="6.986855E-12A"/>

    <pulseGenerator id="Input_13__7" delay="0.0s" duration="100.0s" amplitude="1.513938E-11A"/>

    <pulseGenerator id="Input_13__8" delay="0.0s" duration="100.0s" amplitude="1.581057E-11A"/>

    <pulseGenerator id="Input_13__9" delay="0.0s" duration="100.0s" amplitude="1.506472E-13A"/>

    <pulseGenerator id="Input_1" delay="1.0s" duration="4.0E-4s" amplitude="4.0E-10A"/>

    <pulseGenerator id="Input_1__0" delay="0.1685385s" duration="4.0E-4s" amplitude="4.0E-10A"/>

    <pulseGenerator id="Input_1__1" delay="0.8421524s" duration="4.0E-4s" amplitude="4.0E-10A"/>

    <pulseGenerator id="Input_1__2" delay="1.137337s" duration="4.0E-4s" amplitude="4.0E-10A"/>

    <pulseGenerator id="Input_1__3" delay="1.216942s" duration="4.0E-4s" amplitude="4.0E-10A"/>

    <pulseGenerator id="Input_1__4" delay="1.119585s" duration="4.0E-4s" amplitude="4.0E-10A"/>

    <pulseGenerator id="Input_1__5" delay="0.1179781s" duration="4.0E-4s" amplitude="4.0E-10A"/>

    <pulseGenerator id="Input_1__6" delay="0.3842579s" duration="4.0E-4s" amplitude="4.0E-10A"/>

    <pulseGenerator id="Input_1__7" delay="1.354372s" duration="4.0E-4s" amplitude="4.0E-10A"/>

    <pulseGenerator id="Input_1__8" delay="1.054988s" duration="4.0E-4s" amplitude="4.0E-10A"/>

    <pulseGenerator id="Input_1__9" delay="0.4820098s" duration="4.0E-4s" amplitude="4.0E-10A"/>

    <pulseGenerator id="Input_1__10" delay="0.9613165s" duration="4.0E-4s" amplitude="4.0E-10A"/>

    <pulseGenerator id="Input_1__11" delay="0.1545924s" duration="4.0E-4s" amplitude="4.0E-10A"/>

    <pulseGenerator id="Input_1__12" delay="1.010192s" duration="4.0E-4s" amplitude="4.0E-10A"/>

    <pulseGenerator id="Input_1__13" delay="0.4371514s" duration="4.0E-4s" amplitude="4.0E-10A"/>

    <pulseGenerator id="Input_1__14" delay="0.6982412s" duration="4.0E-4s" amplitude="4.0E-10A"/>

    <pulseGenerator id="Input_1__15" delay="0.5508127s" duration="4.0E-4s" amplitude="4.0E-10A"/>

    <pulseGenerator id="Input_1__16" delay="1.386254s" duration="4.0E-4s" amplitude="4.0E-10A"/>

    <pulseGenerator id="Input_1__17" delay="1.367186s" duration="4.0E-4s" amplitude="4.0E-10A"/>

    <pulseGenerator id="Input_1__18" delay="1.476865s" duration="4.0E-4s" amplitude="4.0E-10A"/>

    <pulseGenerator id="Input_1__19" delay="1.157431s" duration="4.0E-4s" amplitude="4.0E-10A"/>

    <pulseGenerator id="C04_FRB_RandPulses" delay="0.0s" duration="1000.0s" amplitude="2.0E-10A"/>

    <pulseGenerator id="C04_FRB_RandPulses__0" delay="0.0s" duration="1000.0s" amplitude="1.835953E-10A"/>

    <pulseGenerator id="C04_FRB_RandPulses__1" delay="0.0s" duration="1000.0s" amplitude="1.676075E-10A"/>

    <pulseGenerator id="C04_FRB_RandPulses__2" delay="0.0s" duration="1000.0s" amplitude="2.49625E-10A"/>

    <pulseGenerator id="C04_FRB_RandPulses__3" delay="0.0s" duration="1000.0s" amplitude="1.856451E-10A"/>

    <pulseGenerator id="C04_FRB_RandPulses__4" delay="0.0s" duration="1000.0s" amplitude="1.802654E-10A"/>

    <pulseGenerator id="C04_FRB_RandPulses__5" delay="0.0s" duration="1000.0s" amplitude="2.274479E-10A"/>

    <pulseGenerator id="Input_0" delay="0.0s" duration="100.0s" amplitude="1.0E-10A"/>

    <pulseGenerator id="Input_0__0" delay="0.0s" duration="100.0s" amplitude="6.204299E-11A"/>

    <pulseGenerator id="Input_0__1" delay="0.0s" duration="100.0s" amplitude="2.007036E-11A"/>

    <pulseGenerator id="Input_0__2" delay="0.0s" duration="100.0s" amplitude="1.003572E-10A"/>

    <pulseGenerator id="Input_0__3" delay="0.0s" duration="100.0s" amplitude="1.592151E-10A"/>

    <pulseGenerator id="Input_0__4" delay="0.0s" duration="100.0s" amplitude="1.575464E-10A"/>

    <pulseGenerator id="Input_0__5" delay="0.0s" duration="100.0s" amplitude="2.122223E-12A"/>

    <pulseGenerator id="Input_0__6" delay="0.0s" duration="100.0s" amplitude="1.791898E-10A"/>

    <pulseGenerator id="Input_0__7" delay="0.0s" duration="100.0s" amplitude="6.239855E-11A"/>

    <pulseGenerator id="Input_0__8" delay="0.0s" duration="100.0s" amplitude="1.875188E-10A"/>

    <pulseGenerator id="Input_0__9" delay="0.0s" duration="100.0s" amplitude="3.402091E-11A"/>

    <network id="network_t3" type="networkWithTemperature" temperature="6.3 degC">

        <population id="CG_C04_RS_sm" component="L23PyrRS" type="populationList" size="20">
            <instance id="0">
                <location x="944.57227" y="-707.9878" z="-253.66602"/>
            </instance>
            <instance id="1">
                <location x="-1024.0112" y="-728.2564" z="-435.5686"/>
            </instance>
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        </population>

        <population id="CG_C04_AxAx_sm" component="SupAxAx" type="populationList" size="10">
            <instance id="0">
                <location x="434.6869" y="-775.8003" z="358.54468"/>
            </instance>
            <instance id="1">
                <location x="-1259.8822" y="-755.1695" z="466.36548"/>
            </instance>
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        </population>

        <population id="CG_C04_Bask_sm" component="SupBasket" type="populationList" size="10">
            <instance id="0">
                <location x="-668.8129" y="-770.49646" z="-1198.1812"/>
            </instance>
            <instance id="1">
                <location x="251.70874" y="-696.8513" z="15.315063"/>
            </instance>
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        </population>

        <population id="CG_C04_LTS_sm" component="SupLTSInter" type="populationList" size="10">
            <instance id="0">
                <location x="-536.7519" y="-775.6159" z="-1266.0444"/>
            </instance>
            <instance id="1">
                <location x="-579.12683" y="-806.1698" z="565.9612"/>
            </instance>
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        </population>

        <population id="CG_C04_FRB_sm" component="L23PyrFRB_varInit" type="populationList" size="6">
            <instance id="0">
                <location x="-739.27563" y="-798.43396" z="-440.9723"/>
            </instance>
            <instance id="1">
                <location x="975.8342" y="-870.85077" z="1090.1094"/>
            </instance>
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        </population>

        <projection id="LTS_AxAx_sm" presynapticPopulation="CG_C04_LTS_sm" postsynapticPopulation="CG_C04_AxAx_sm" synapse="Inh_LTS_FS">
            <connection id="0" preCellId="../CG_C04_LTS_sm/5/SupLTSInter" postCellId="../CG_C04_AxAx_sm/0/SupAxAx" preSegmentId="112" preFractionAlong="0.26785243" postSegmentId="82" postFractionAlong="0.36041966"/>
            <connection id="1" preCellId="../CG_C04_LTS_sm/3/SupLTSInter" postCellId="../CG_C04_AxAx_sm/0/SupAxAx" preSegmentId="116" preFractionAlong="0.6782849" postSegmentId="91" postFractionAlong="0.99472666"/>
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        </projection>

        <projection id="Bask_FRB_sm" presynapticPopulation="CG_C04_Bask_sm" postsynapticPopulation="CG_C04_FRB_sm" synapse="Inh_Bask_Pyr">
            <connection id="0" preCellId="../CG_C04_Bask_sm/4/SupBasket" postCellId="../CG_C04_FRB_sm/0/L23PyrFRB_varInit" preSegmentId="117" preFractionAlong="0.5181986" postSegmentId="5" postFractionAlong="0.005338138"/>
            <connection id="1" preCellId="../CG_C04_Bask_sm/0/SupBasket" postCellId="../CG_C04_FRB_sm/0/L23PyrFRB_varInit" preSegmentId="117" preFractionAlong="0.19871648" postSegmentId="0" postFractionAlong="0.8948809"/>
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        </projection>

        <projection id="Bask_Bask_sm" presynapticPopulation="CG_C04_Bask_sm" postsynapticPopulation="CG_C04_Bask_sm" synapse="Inh_Bask_FS">
            <connection id="0" preCellId="../CG_C04_Bask_sm/8/SupBasket" postCellId="../CG_C04_Bask_sm/0/SupBasket" preSegmentId="0" preFractionAlong="0.27358294" postSegmentId="3" postFractionAlong="0.7385994"/>
            <connection id="1" preCellId="../CG_C04_Bask_sm/2/SupBasket" postCellId="../CG_C04_Bask_sm/0/SupBasket" preSegmentId="0" preFractionAlong="0.41573644" postSegmentId="3" postFractionAlong="0.6945793"/>
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        </projection>

        <projection id="Bask_RS_sm" presynapticPopulation="CG_C04_Bask_sm" postsynapticPopulation="CG_C04_RS_sm" synapse="Inh_Bask_Pyr">
            <connection id="0" preCellId="../CG_C04_Bask_sm/6/SupBasket" postCellId="../CG_C04_RS_sm/0/L23PyrRS" preSegmentId="112" preFractionAlong="0.055109765" postSegmentId="5" postFractionAlong="0.6650566"/>
            <connection id="1" preCellId="../CG_C04_Bask_sm/9/SupBasket" postCellId="../CG_C04_RS_sm/0/L23PyrRS" preSegmentId="116" preFractionAlong="0.18468338" postSegmentId="1" postFractionAlong="0.032009378"/>
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        </projection>

        <projection id="LTS_RS_sm" presynapticPopulation="CG_C04_LTS_sm" postsynapticPopulation="CG_C04_RS_sm" synapse="Inh_LTS_Pyr">
            <connection id="0" preCellId="../CG_C04_LTS_sm/5/SupLTSInter" postCellId="../CG_C04_RS_sm/0/L23PyrRS" preSegmentId="117" preFractionAlong="0.10620697" postSegmentId="86" postFractionAlong="0.04617179"/>
            <connection id="1" preCellId="../CG_C04_LTS_sm/9/SupLTSInter" postCellId="../CG_C04_RS_sm/0/L23PyrRS" preSegmentId="116" preFractionAlong="0.34365073" postSegmentId="37" postFractionAlong="0.012691651"/>
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        </projection>

        <projection id="Bask_AxAx_sm" presynapticPopulation="CG_C04_Bask_sm" postsynapticPopulation="CG_C04_AxAx_sm" synapse="Inh_Bask_FS">
            <connection id="0" preCellId="../CG_C04_Bask_sm/0/SupBasket" postCellId="../CG_C04_AxAx_sm/0/SupAxAx" preSegmentId="0" preFractionAlong="0.8156393" postSegmentId="80" postFractionAlong="0.79460603"/>
            <connection id="1" preCellId="../CG_C04_Bask_sm/0/SupBasket" postCellId="../CG_C04_AxAx_sm/0/SupAxAx" preSegmentId="1" preFractionAlong="0.7358993" postSegmentId="28" postFractionAlong="0.26744613"/>
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        </projection>

        <projection id="FRB_LTS_sm" presynapticPopulation="CG_C04_FRB_sm" postsynapticPopulation="CG_C04_LTS_sm" synapse="Exc_Pyr_Int">
            <connection id="0" preCellId="../CG_C04_FRB_sm/4/L23PyrFRB_varInit" postCellId="../CG_C04_LTS_sm/0/SupLTSInter" preSegmentId="146" preFractionAlong="0.5204757" postSegmentId="6" postFractionAlong="0.10035553"/>
            <connection id="1" preCellId="../CG_C04_FRB_sm/5/L23PyrFRB_varInit" postCellId="../CG_C04_LTS_sm/0/SupLTSInter" preSegmentId="147" preFractionAlong="0.8204037" postSegmentId="61" postFractionAlong="0.16054215"/>
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        </projection>

        <projection id="AxAx_FRB_sm" presynapticPopulation="CG_C04_AxAx_sm" postsynapticPopulation="CG_C04_FRB_sm" synapse="Inh_Axo_Pyr">
            <connection id="0" preCellId="../CG_C04_AxAx_sm/0/SupAxAx" postCellId="../CG_C04_FRB_sm/0/L23PyrFRB_varInit" preSegmentId="113" preFractionAlong="0.4072293" postSegmentId="137" postFractionAlong="0.6136473"/>
            <connection id="1" preCellId="../CG_C04_AxAx_sm/8/SupAxAx" postCellId="../CG_C04_FRB_sm/0/L23PyrFRB_varInit" preSegmentId="113" preFractionAlong="0.23576008" postSegmentId="137" postFractionAlong="0.8211531"/>
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        </projection>

        <projection id="RS_Bask_sm" presynapticPopulation="CG_C04_RS_sm" postsynapticPopulation="CG_C04_Bask_sm" synapse="Exc_Pyr_Int">
            <connection id="0" preCellId="../CG_C04_RS_sm/0/L23PyrRS" postCellId="../CG_C04_Bask_sm/0/SupBasket" preSegmentId="142" preFractionAlong="0.8690885" postSegmentId="57" postFractionAlong="0.47138062"/>
            <connection id="1" preCellId="../CG_C04_RS_sm/5/L23PyrRS" postCellId="../CG_C04_Bask_sm/0/SupBasket" preSegmentId="142" preFractionAlong="0.978771" postSegmentId="19" postFractionAlong="0.9938105"/>
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        </projection>

        <projection id="RS_AxAx_sm" presynapticPopulation="CG_C04_RS_sm" postsynapticPopulation="CG_C04_AxAx_sm" synapse="Exc_Pyr_Int">
            <connection id="0" preCellId="../CG_C04_RS_sm/7/L23PyrRS" postCellId="../CG_C04_AxAx_sm/0/SupAxAx" preSegmentId="142" preFractionAlong="0.2545229" postSegmentId="33" postFractionAlong="0.13877864"/>
            <connection id="1" preCellId="../CG_C04_RS_sm/16/L23PyrRS" postCellId="../CG_C04_AxAx_sm/0/SupAxAx" preSegmentId="147" preFractionAlong="0.08687266" postSegmentId="61" postFractionAlong="0.626974"/>
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        </projection>

        <projection id="FRB_Bask_sm" presynapticPopulation="CG_C04_FRB_sm" postsynapticPopulation="CG_C04_Bask_sm" synapse="Exc_Pyr_Int">
            <connection id="0" preCellId="../CG_C04_FRB_sm/1/L23PyrFRB_varInit" postCellId="../CG_C04_Bask_sm/0/SupBasket" preSegmentId="146" preFractionAlong="0.195826" postSegmentId="77" postFractionAlong="0.33186138"/>
            <connection id="1" preCellId="../CG_C04_FRB_sm/1/L23PyrFRB_varInit" postCellId="../CG_C04_Bask_sm/0/SupBasket" preSegmentId="143" preFractionAlong="0.5101525" postSegmentId="6" postFractionAlong="0.42428893"/>
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        </projection>

        <projection id="LTS_Pyr_sm" presynapticPopulation="CG_C04_LTS_sm" postsynapticPopulation="CG_C04_FRB_sm" synapse="Inh_LTS_Pyr">
            <connection id="0" preCellId="../CG_C04_LTS_sm/6/SupLTSInter" postCellId="../CG_C04_FRB_sm/0/L23PyrFRB_varInit" preSegmentId="112" preFractionAlong="0.5130985" postSegmentId="55" postFractionAlong="0.09744996"/>
            <connection id="1" preCellId="../CG_C04_LTS_sm/4/SupLTSInter" postCellId="../CG_C04_FRB_sm/0/L23PyrFRB_varInit" preSegmentId="117" preFractionAlong="0.7260806" postSegmentId="58" postFractionAlong="0.44446534"/>
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        </projection>

        <projection id="RS_LTS_sm" presynapticPopulation="CG_C04_RS_sm" postsynapticPopulation="CG_C04_LTS_sm" synapse="Exc_Pyr_Int">
            <connection id="0" preCellId="../CG_C04_RS_sm/18/L23PyrRS" postCellId="../CG_C04_LTS_sm/0/SupLTSInter" preSegmentId="142" preFractionAlong="0.53398645" postSegmentId="9" postFractionAlong="0.20286351"/>
            <connection id="1" preCellId="../CG_C04_RS_sm/14/L23PyrRS" postCellId="../CG_C04_LTS_sm/0/SupLTSInter" preSegmentId="147" preFractionAlong="0.7060384" postSegmentId="32" postFractionAlong="0.061430357"/>
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        </projection>

        <projection id="LTS_LTS_sm" presynapticPopulation="CG_C04_LTS_sm" postsynapticPopulation="CG_C04_LTS_sm" synapse="Inh_LTS_LTS">
            <connection id="0" preCellId="../CG_C04_LTS_sm/2/SupLTSInter" postCellId="../CG_C04_LTS_sm/0/SupLTSInter" preSegmentId="113" preFractionAlong="0.40999943" postSegmentId="58" postFractionAlong="0.28570977"/>
            <connection id="1" preCellId="../CG_C04_LTS_sm/1/SupLTSInter" postCellId="../CG_C04_LTS_sm/0/SupLTSInter" preSegmentId="117" preFractionAlong="0.37332362" postSegmentId="63" postFractionAlong="0.4870555"/>
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        </projection>

        <projection id="Bask_LTS_sm" presynapticPopulation="CG_C04_Bask_sm" postsynapticPopulation="CG_C04_LTS_sm" synapse="Inh_Bask_LTS">
            <connection id="0" preCellId="../CG_C04_Bask_sm/6/SupBasket" postCellId="../CG_C04_LTS_sm/0/SupLTSInter" preSegmentId="117" preFractionAlong="0.4576929" postSegmentId="88" postFractionAlong="0.39118195"/>
            <connection id="1" preCellId="../CG_C04_Bask_sm/1/SupBasket" postCellId="../CG_C04_LTS_sm/0/SupLTSInter" preSegmentId="117" preFractionAlong="0.6788992" postSegmentId="60" postFractionAlong="0.5400543"/>
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        </projection>

        <projection id="FRB_FRB_sm" presynapticPopulation="CG_C04_FRB_sm" postsynapticPopulation="CG_C04_FRB_sm" synapse="Exc_Pyr_Pyr">
            <connection id="0" preCellId="../CG_C04_FRB_sm/4/L23PyrFRB_varInit" postCellId="../CG_C04_FRB_sm/0/L23PyrFRB_varInit" preSegmentId="142" preFractionAlong="0.1179581" postSegmentId="64" postFractionAlong="0.32447997"/>
            <connection id="1" preCellId="../CG_C04_FRB_sm/1/L23PyrFRB_varInit" postCellId="../CG_C04_FRB_sm/0/L23PyrFRB_varInit" preSegmentId="146" preFractionAlong="0.2555971" postSegmentId="52" postFractionAlong="0.80596393"/>
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        </projection>

        <projection id="FRB_RS_sm" presynapticPopulation="CG_C04_FRB_sm" postsynapticPopulation="CG_C04_RS_sm" synapse="Exc_Pyr_Pyr">
            <connection id="0" preCellId="../CG_C04_FRB_sm/1/L23PyrFRB_varInit" postCellId="../CG_C04_RS_sm/0/L23PyrRS" preSegmentId="143" preFractionAlong="0.6782449" postSegmentId="59" postFractionAlong="0.24437743"/>
            <connection id="1" preCellId="../CG_C04_FRB_sm/4/L23PyrFRB_varInit" postCellId="../CG_C04_RS_sm/0/L23PyrRS" preSegmentId="146" preFractionAlong="0.48549604" postSegmentId="36" postFractionAlong="0.73660004"/>
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        </projection>

        <projection id="AxAx_RS_sm" presynapticPopulation="CG_C04_AxAx_sm" postsynapticPopulation="CG_C04_RS_sm" synapse="Inh_Axo_Pyr">
            <connection id="0" preCellId="../CG_C04_AxAx_sm/5/SupAxAx" postCellId="../CG_C04_RS_sm/0/L23PyrRS" preSegmentId="117" preFractionAlong="0.19395833" postSegmentId="136" postFractionAlong="0.03666091"/>
            <connection id="1" preCellId="../CG_C04_AxAx_sm/6/SupAxAx" postCellId="../CG_C04_RS_sm/0/L23PyrRS" preSegmentId="112" preFractionAlong="0.99237496" postSegmentId="137" postFractionAlong="0.40835923"/>
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        </projection>

        <projection id="LTS_Bask_sm" presynapticPopulation="CG_C04_LTS_sm" postsynapticPopulation="CG_C04_Bask_sm" synapse="Inh_LTS_FS">
            <connection id="0" preCellId="../CG_C04_LTS_sm/9/SupLTSInter" postCellId="../CG_C04_Bask_sm/0/SupBasket" preSegmentId="117" preFractionAlong="0.5705507" postSegmentId="13" postFractionAlong="0.96716976"/>
            <connection id="1" preCellId="../CG_C04_LTS_sm/4/SupLTSInter" postCellId="../CG_C04_Bask_sm/0/SupBasket" preSegmentId="117" preFractionAlong="0.10485418" postSegmentId="36" postFractionAlong="0.32318115"/>
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        </projection>

        <projection id="FRB_AxAx_sm" presynapticPopulation="CG_C04_FRB_sm" postsynapticPopulation="CG_C04_AxAx_sm" synapse="Exc_Pyr_Int">
            <connection id="0" preCellId="../CG_C04_FRB_sm/2/L23PyrFRB_varInit" postCellId="../CG_C04_AxAx_sm/0/SupAxAx" preSegmentId="143" preFractionAlong="0.21813948" postSegmentId="61" postFractionAlong="0.91821545"/>
            <connection id="1" preCellId="../CG_C04_FRB_sm/1/L23PyrFRB_varInit" postCellId="../CG_C04_AxAx_sm/0/SupAxAx" preSegmentId="147" preFractionAlong="0.6744787" postSegmentId="7" postFractionAlong="0.63614357"/>
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        </projection>

        <projection id="RS_FRB_sm" presynapticPopulation="CG_C04_RS_sm" postsynapticPopulation="CG_C04_FRB_sm" synapse="Exc_Pyr_Pyr">
            <connection id="0" preCellId="../CG_C04_RS_sm/12/L23PyrRS" postCellId="../CG_C04_FRB_sm/0/L23PyrFRB_varInit" preSegmentId="141" preFractionAlong="0.95081234" postSegmentId="31" postFractionAlong="0.43282664"/>
            <connection id="1" preCellId="../CG_C04_RS_sm/1/L23PyrRS" postCellId="../CG_C04_FRB_sm/0/L23PyrFRB_varInit" preSegmentId="138" preFractionAlong="0.32992828" postSegmentId="41" postFractionAlong="0.09679207"/>
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        </projection>

        <projection id="RS_RS_sm" presynapticPopulation="CG_C04_RS_sm" postsynapticPopulation="CG_C04_RS_sm" synapse="Exc_Pyr_Pyr">
            <connection id="0" preCellId="../CG_C04_RS_sm/15/L23PyrRS" postCellId="../CG_C04_RS_sm/0/L23PyrRS" preSegmentId="142" preFractionAlong="0.4618924" postSegmentId="40" postFractionAlong="0.11084554"/>
            <connection id="1" preCellId="../CG_C04_RS_sm/17/L23PyrRS" postCellId="../CG_C04_RS_sm/0/L23PyrRS" preSegmentId="144" preFractionAlong="0.044966165" postSegmentId="39" postFractionAlong="0.2105957"/>
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        </projection>

        <electricalProjection id="RS_RS_gap_sm" presynapticPopulation="CG_C04_RS_sm" postsynapticPopulation="CG_C04_RS_sm">
            <electricalConnection id="0" preCell="0" postCell="2" preSegment="142" preFractionAlong="0.32374665" postSegment="146" postFractionAlong="0.8668841" synapse="GapJuncCML"/>
            <electricalConnection id="1" preCell="0" postCell="10" preSegment="146" preFractionAlong="0.09071873" postSegment="143" postFractionAlong="0.27391332" synapse="GapJuncCML"/>
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        </electricalProjection>

        <electricalProjection id="AxAx_AxAx_gap_sm" presynapticPopulation="CG_C04_AxAx_sm" postsynapticPopulation="CG_C04_AxAx_sm">
            <electricalConnection id="0" preCell="0" postCell="3" preSegment="37" preFractionAlong="0.09978991" postSegment="63" postFractionAlong="0.6237974" synapse="GapJuncFS"/>
            <electricalConnection id="1" preCell="0" postCell="5" preSegment="89" preFractionAlong="0.088014" postSegment="10" postFractionAlong="0.035585023" synapse="GapJuncFS"/>
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        </electricalProjection>

        <electricalProjection id="Bask_Bask_gap_sm" presynapticPopulation="CG_C04_Bask_sm" postsynapticPopulation="CG_C04_Bask_sm">
            <electricalConnection id="0" preCell="0" postCell="9" preSegment="35" preFractionAlong="0.7691538" postSegment="10" postFractionAlong="0.06798096" synapse="GapJuncFS"/>
            <electricalConnection id="1" preCell="0" postCell="6" preSegment="88" preFractionAlong="0.096367456" postSegment="89" postFractionAlong="0.11495348" synapse="GapJuncFS"/>
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        </electricalProjection>

        <electricalProjection id="LTS_LTS_gap_sm" presynapticPopulation="CG_C04_LTS_sm" postsynapticPopulation="CG_C04_LTS_sm">
            <electricalConnection id="0" preCell="0" postCell="6" preSegment="90" preFractionAlong="0.9330494" postSegment="65" postFractionAlong="0.68798554" synapse="GapJuncLTS"/>
            <electricalConnection id="1" preCell="0" postCell="3" preSegment="36" preFractionAlong="0.256308" postSegment="13" postFractionAlong="0.56564975" synapse="GapJuncLTS"/>
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        </electricalProjection>

        <electricalProjection id="FRB_RS_gap_sm" presynapticPopulation="CG_C04_FRB_sm" postsynapticPopulation="CG_C04_RS_sm">
            <electricalConnection id="0" preCell="0" postCell="1" preSegment="143" preFractionAlong="0.99684757" postSegment="147" postFractionAlong="0.8874812" synapse="GapJuncCML"/>
            <electricalConnection id="1" preCell="1" postCell="13" preSegment="146" preFractionAlong="0.9792894" postSegment="142" postFractionAlong="0.6652197" synapse="GapJuncCML"/>
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        </electricalProjection>

        <electricalProjection id="RS_FRB_gap_sm" presynapticPopulation="CG_C04_RS_sm" postsynapticPopulation="CG_C04_FRB_sm">
            <electricalConnection id="0" preCell="13" postCell="4" preSegment="142" preFractionAlong="0.052252334" postSegment="147" postFractionAlong="0.010905432" synapse="GapJuncCML"/>
        </electricalProjection>

    </network>

</neuroml>
