<?xml version="1.0" encoding="UTF-8"?>
<neuroml xmlns="http://www.neuroml.org/schema/neuroml2" xmlns:xsi="http://www.w3.org/2001/XMLSchema-instance" xsi:schemaLocation="http://www.neuroml.org/schema/neuroml2  https://raw.githubusercontent.com/NeuroML/NeuroML2/development/Schemas/NeuroML2/NeuroML_v2beta4.xsd" id="network_Thalamocortical6">

    <notes>

Cell Group: CG_C04_FRB_sm contains 6 cells
Cell Group: CG_C04_LTS_sm contains 10 cells
Cell Group: CG_C04_AxAx_sm contains 10 cells
Cell Group: CG_C04_RS_sm contains 20 cells
Cell Group: CG_C04_Bask_sm contains 10 cells

    </notes>

    <include href="L23PyrFRB_varInit.cell.nml"/>
    <include href="L23PyrRS.cell.nml"/>

    <include href="SupAxAx.cell.nml"/>
    <include href="SupBasket.cell.nml"/>
    <include href="SupLTSInter.cell.nml"/>

    <network id="network_Thalamocortical6" type="networkWithTemperature" temperature="6.3 degC">

        <population id="CG_C04_FRB_sm" component="L23PyrFRB_varInit" type="populationList" size="6">
            <instance id="0">
                <location x="7.7558594" y="-817.10846" z="-243.32056"/>
            </instance>
            <instance id="1">
                <location x="-161.86707" y="-704.16754" z="-239.35767"/>
            </instance>
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        </population>

        <population id="CG_C04_LTS_sm" component="SupLTSInter" type="populationList" size="10">
            <instance id="0">
                <location x="1237.2773" y="-715.6221" z="319.58032"/>
            </instance>
            <instance id="1">
                <location x="1182.2478" y="-780.2685" z="350.1372"/>
            </instance>
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        </population>

        <population id="CG_C04_AxAx_sm" component="SupAxAx" type="populationList" size="10">
            <instance id="0">
                <location x="899.3928" y="-670.7247" z="949.5244"/>
            </instance>
            <instance id="1">
                <location x="405.78064" y="-690.85706" z="1351.7029"/>
            </instance>
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        </population>

        <population id="CG_C04_RS_sm" component="L23PyrRS" type="populationList" size="20">
            <instance id="0">
                <location x="-818.1918" y="-830.4027" z="-715.3004"/>
            </instance>
            <instance id="1">
                <location x="-454.14722" y="-783.69275" z="886.1692"/>
            </instance>
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        </population>

        <population id="CG_C04_Bask_sm" component="SupBasket" type="populationList" size="10">
            <instance id="0">
                <location x="-507.80762" y="-691.1363" z="434.56165"/>
            </instance>
            <instance id="1">
                <location x="824.9719" y="-694.5928" z="-767.5629"/>
            </instance>
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        </population>

    </network>

</neuroml>
