<?xml version="1.0" encoding="UTF-8"?>
<neuroml xmlns="http://www.neuroml.org/schema/neuroml2" xmlns:xsi="http://www.w3.org/2001/XMLSchema-instance" xsi:schemaLocation="http://www.neuroml.org/schema/neuroml2  https://raw.githubusercontent.com/NeuroML/NeuroML2/development/Schemas/NeuroML2/NeuroML_v2beta4.xsd" id="network_t3">

    <notes>

Network structure (NeuroML 2beta4) for project: t3 saved with neuroConstruct v1.7.1 on: 12:36:38, 20-Oct-15

Cell Group: CG3D_L23PyrFRB contains 5 cells
Cell Group: CG3D_SupLTS contains 9 cells

Network connection: NC3D_L23PyrFRB_SupLTS contains 45 individual synaptic connections
Network connection: NC3D_L23PyrFRB_L23PyrFRB contains 25 individual synaptic connections

    </notes>

    <include href="cal.channel.nml"/>
    <include href="cat.channel.nml"/>
    <include href="cat_a.channel.nml"/>
    <include href="k2.channel.nml"/>
    <include href="ka.channel.nml"/>
    <include href="kahp.channel.nml"/>
    <include href="kahp_slower.channel.nml"/>
    <include href="kc.channel.nml"/>
    <include href="kc_fast.channel.nml"/>
    <include href="kdr.channel.nml"/>
    <include href="kdr_fs.channel.nml"/>
    <include href="km.channel.nml"/>
    <include href="L23PyrFRB_varInit.cell.nml"/>
    <include href="naf.channel.nml"/>
    <include href="naf2.channel.nml"/>
    <include href="naf2__a0__b0__c0__d0__fastNa_shiftmin2_5.channel.nml"/>
    <include href="naf__a0__b0__c0__d0__fastNa_shiftmin3_5.channel.nml"/>
    <include href="nap.channel.nml"/>
    <include href="pas.channel.nml"/>
    <include href="SupLTSInter.cell.nml"/>
    <include href="Syn_AMPA_SupPyr_SupLTS.synapse.nml"/>
    <include href="Syn_AMPA_SupPyr_SupPyr.synapse.nml"/>
    <include href="Syn_NMDA_FRBPyr_SupLTS.synapse.nml"/>
    <include href="Syn_NMDA_SupPyr_SupPyr.synapse.nml"/>
    <pulseGenerator id="DepCurr_L23FRB" delay="0.0s" duration="20.0s" amplitude="3.0E-10A"/>

    <pulseGenerator id="DepCurr_L23FRB__0" delay="0.0s" duration="20.0s" amplitude="3.37936E-10A"/>

    <pulseGenerator id="DepCurr_L23FRB__1" delay="0.0s" duration="20.0s" amplitude="3.397182E-10A"/>

    <pulseGenerator id="DepCurr_L23FRB__2" delay="0.0s" duration="20.0s" amplitude="2.888099E-10A"/>

    <pulseGenerator id="DepCurr_L23FRB__3" delay="0.0s" duration="20.0s" amplitude="3.240274E-10A"/>

    <pulseGenerator id="DepCurr_L23FRB__4" delay="0.0s" duration="20.0s" amplitude="2.783019E-10A"/>

    <network id="network_t3" type="networkWithTemperature" temperature="6.3 degC">

        <population id="CG3D_L23PyrFRB" component="L23PyrFRB_varInit" type="populationList" size="5">
            <instance id="0">
                <location x="100.319305" y="-176.91832" z="-0.47833252"/>
            </instance>
            <instance id="1">
                <location x="-51.709503" y="-346.80432" z="209.91559"/>
            </instance>
            <instance id="2">
                <location x="7.999054" y="-209.40753" z="-178.45229"/>
            </instance>
            <instance id="3">
                <location x="210.03497" y="-163.65475" z="32.07022"/>
            </instance>
            <instance id="4">
                <location x="153.54877" y="-149.15341" z="-71.77197"/>
            </instance>
        </population>

        <population id="CG3D_SupLTS" component="SupLTSInter" type="populationList" size="9">
            <instance id="0">
                <location x="120.72101" y="-284.24158" z="-15.682098"/>
            </instance>
            <instance id="1">
                <location x="160.65488" y="-320.52972" z="-65.86623"/>
            </instance>
            <instance id="2">
                <location x="166.9787" y="-361.16846" z="-139.3796"/>
            </instance>
            <instance id="3">
                <location x="-105.56862" y="-250.98953" z="140.93411"/>
            </instance>
            <instance id="4">
                <location x="53.875244" y="-233.21768" z="-165.96582"/>
            </instance>
            <instance id="5">
                <location x="-123.17142" y="-343.86533" z="-19.149567"/>
            </instance>
            <instance id="6">
                <location x="152.30325" y="-198.23259" z="-182.94597"/>
            </instance>
            <instance id="7">
                <location x="-91.062546" y="-333.71695" z="-193.37054"/>
            </instance>
            <instance id="8">
                <location x="128.23978" y="-251.26753" z="-8.151978"/>
            </instance>
        </population>

        <projection id="NC3D_L23PyrFRB_SupLTS" presynapticPopulation="CG3D_L23PyrFRB" postsynapticPopulation="CG3D_SupLTS" synapse="Syn_AMPA_SupPyr_SupLTS">
            <connection id="0" preCellId="../CG3D_L23PyrFRB/2/L23PyrFRB_varInit" postCellId="../CG3D_SupLTS/0/SupLTSInter" preSegmentId="139" preFractionAlong="0.8224869" postSegmentId="18" postFractionAlong="0.53949004"/>
            <connection id="1" preCellId="../CG3D_L23PyrFRB/4/L23PyrFRB_varInit" postCellId="../CG3D_SupLTS/0/SupLTSInter" preSegmentId="140" preFractionAlong="0.21008386" postSegmentId="35" postFractionAlong="0.8068402"/>
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        </projection>

        <projection id="NC3D_L23PyrFRB_L23PyrFRB" presynapticPopulation="CG3D_L23PyrFRB" postsynapticPopulation="CG3D_L23PyrFRB" synapse="Syn_AMPA_SupPyr_SupPyr">
            <connection id="0" preCellId="../CG3D_L23PyrFRB/3/L23PyrFRB_varInit" postCellId="../CG3D_L23PyrFRB/0/L23PyrFRB_varInit" preSegmentId="146" preFractionAlong="0.008297581" postSegmentId="18" postFractionAlong="0.828479"/>
            <connection id="1" preCellId="../CG3D_L23PyrFRB/2/L23PyrFRB_varInit" postCellId="../CG3D_L23PyrFRB/0/L23PyrFRB_varInit" preSegmentId="147" preFractionAlong="0.94968635" postSegmentId="21" postFractionAlong="0.46206298"/>
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        </projection>

    </network>

</neuroml>
