<?xml version="1.0" encoding="ISO-8859-1"?>
<neuroml xmlns="http://www.neuroml.org/schema/neuroml2" xmlns:xsi="http://www.w3.org/2001/XMLSchema-instance" xsi:schemaLocation="http://www.neuroml.org/schema/neuroml2 https://raw.github.com/NeuroML/NeuroML2/development/Schemas/NeuroML2/NeuroML_v2beta4.xsd" id="Syn_GABAA_SupAxAx_DeepPyr">

    <notes>ChannelML file describing a single synaptic mechanism</notes>

    <expOneSynapse id="Syn_GABAA_SupAxAx_DeepPyr" tauDecay="6.0ms" gbase="1e-06mS" erev="-75.0mV">

        <notes>Synapse with syn scaling constant c = 1 nS (translating to max cond of 1e-06 mS), time course: 6 ms and reversal potential: -75 mV.
        Automatically generated by command:  genSyn.py Syn_GABAA_SupAxAx_DeepPyr 6 1 -75 </notes>
</expOneSynapse>

</neuroml>
