<?xml version="1.0" encoding="ISO-8859-1"?>
<neuroml xmlns="http://www.neuroml.org/schema/neuroml2" xmlns:xsi="http://www.w3.org/2001/XMLSchema-instance" xsi:schemaLocation="http://www.neuroml.org/schema/neuroml2 https://raw.github.com/NeuroML/NeuroML2/development/Schemas/NeuroML2/NeuroML_v2beta4.xsd" id="Syn_GABAA_nRT_TCR_s">

    <notes>ChannelML file describing a single synaptic mechanism</notes>

    <expOneSynapse id="Syn_GABAA_nRT_TCR_s" tauDecay="10.0ms" gbase="1.4e-06mS" erev="-81.0mV">

        <notes>Synapse with syn scaling constant c = 1.4 nS (translating to max cond of 1.4e-06 mS), time course: 10 ms and reversal potential: -81 mV.
        Automatically generated by command:  genSyn.py Syn_GABAA_nRT_TCR_s 10 1.4 -81 </notes>
</expOneSynapse>

</neuroml>
