<?xml version="1.0" encoding="ISO-8859-1"?>
<neuroml xmlns="http://www.neuroml.org/schema/neuroml2" xmlns:xsi="http://www.w3.org/2001/XMLSchema-instance" xsi:schemaLocation="http://www.neuroml.org/schema/neuroml2 https://raw.github.com/NeuroML/NeuroML2/development/Schemas/NeuroML2/NeuroML_v2beta4.xsd" id="Syn_Elect_DeepPyr_DeepPyr">

    <notes>ChannelML file describing a single synaptic mechanism</notes>

    <gapJunction id="Syn_Elect_DeepPyr_DeepPyr" conductance="4e-06mS"/>

</neuroml>
