<?xml version="1.0" encoding="ISO-8859-1"?>
<neuroml xmlns="http://www.neuroml.org/schema/neuroml2" xmlns:xsi="http://www.w3.org/2001/XMLSchema-instance" xsi:schemaLocation="http://www.neuroml.org/schema/neuroml2 https://raw.github.com/NeuroML/NeuroML2/development/Schemas/NeuroML2/NeuroML_v2beta4.xsd" id="Syn_GABAA_DeepBask_DeepLTS">

    <notes>ChannelML file describing a single synaptic mechanism</notes>

    <expOneSynapse id="Syn_GABAA_DeepBask_DeepLTS" tauDecay="3.0ms" gbase="7e-07mS" erev="-75.0mV">

        <notes>Synapse with syn scaling constant c = 0.7 nS (translating to max cond of 7e-07 mS), time course: 3 ms and reversal potential: -75 mV.
        Automatically generated by command:  genSyn.py Syn_GABAA_DeepBask_DeepLTS 3 0.7 -75 </notes>
</expOneSynapse>

</neuroml>
