<?xml version="1.0" encoding="ISO-8859-1"?>
<neuroml xmlns="http://www.neuroml.org/schema/neuroml2" xmlns:xsi="http://www.w3.org/2001/XMLSchema-instance" xsi:schemaLocation="http://www.neuroml.org/schema/neuroml2 https://raw.github.com/NeuroML/NeuroML2/development/Schemas/NeuroML2/NeuroML_v2beta4.xsd" id="Syn_NMDA_SupPyr_SupPyr">

    <notes>ChannelML file describing a single synaptic mechanism</notes>

    <blockingPlasticSynapse id="Syn_NMDA_SupPyr_SupPyr" gbase="2.5e-08mS" tauRise="1ms" tauDecay="130.0ms" erev="0.0mV">

        <notes>Synapse with syn scaling constant c = 0.025 nS (translating to max cond of 2.5e-08 mS), time course: 130 ms and reversal potential: 0 mV.
        Automatically generated by command:  genSyn.py Syn_NMDA_SupPyr_SupPyr 130 0.025 0 </notes>

        <blockMechanism type="voltageConcDepBlockMechanism" species="mg" blockConcentration="1.5e-6mol_per_cm3" scalingConc="0.0000035700005712000914mol_per_cm3" scalingVolt="16.129032258064516mV"/>

    </blockingPlasticSynapse>

</neuroml>
