<?xml version="1.0" encoding="ISO-8859-1"?>

<!--
       This file has been generated by neuroConstruct because a cell mechanism (ChannelMLCell Mechanism [InstanceName: cad, channelMLFile: CaD_Conc.xml])
      has a different set of parameters (beta = 0.075, phi = 86666.7) on a group of sections.

      Conversion of the original NML2 file to use the updated parameters is implemented in handleExtraParamsForNml2()
      in https://github.com/NeuralEnsemble/neuroConstruct/blob/master/src/ucl/physiol/neuroconstruct/neuroml/NeuroMLFileManager.java
      See that file to check/improve this conversion
-->

<neuroml xmlns="http://www.neuroml.org/schema/neuroml2" xmlns:xsi="http://www.w3.org/2001/XMLSchema-instance" xsi:schemaLocation="http://www.neuroml.org/schema/neuroml2 https://raw.github.com/NeuroML/NeuroML2/development/Schemas/NeuroML2/NeuroML_v2beta4.xsd" id="cad__beta0_075__phi86666_7">

    <notes>ChannelML file based on Traub et al. 2003</notes>

    <fixedFactorConcentrationModelTraub id="cad__beta0_075__phi86666_7" restingConc="0mol_per_cm3" beta="0.075 per_ms" ion="ca" phi="86666.7 mol_per_cm_per_uA_per_ms"/>

</neuroml>
