<?xml version="1.0" encoding="UTF-8"?>
<neuroml xmlns="http://www.neuroml.org/schema/neuroml2" xmlns:xsi="http://www.w3.org/2001/XMLSchema-instance" xsi:schemaLocation="http://www.neuroml.org/schema/neuroml2  https://raw.github.com/NeuroML/NeuroML2/development/Schemas/NeuroML2/NeuroML_v2beta1.xsd" id="network_Thalamocortical">

<notes>

Network structure (NeuroML 2beta1) for project: Thalamocortical saved with neuroConstruct v1.7.0 on: 14:35:19, 29-Oct-13

Cell Group: CG3D_nRT contains 10 cells
Cell Group: CG3D_DeepBask contains 10 cells
Cell Group: CG3D_DeepAxAx contains 10 cells
Cell Group: CG3D_L5TuftIB contains 80 cells
Cell Group: CG3D_SupBask contains 9 cells
Cell Group: CG3D_L23PyrRS contains 100 cells
Cell Group: CG3D_SupAxAx contains 9 cells
Cell Group: CG3D_L5TuftRS contains 20 cells
Cell Group: CG3D_DeepLTS contains 10 cells
Cell Group: CG3D_L6NonTuftRS contains 50 cells
Cell Group: CG3D_L23PyrFRB contains 5 cells
Cell Group: CG3D_TCR contains 10 cells
Cell Group: CG3D_SupLTS contains 9 cells
Cell Group: CG3D_L4SpinStell contains 24 cells

Network connection: NC3D_SupLTS_SupLTS_Gap contains 21 individual synaptic connections
Network connection: NC3D_DeepAxAx_L23PyrFRB contains 25 individual synaptic connections
Network connection: NC3D_DeepBask_L5TuftIB contains 1600 individual synaptic connections
Network connection: NC3D_DeepBask_L4SpinStell contains 480 individual synaptic connections
Network connection: NC3D_L23PyrFRB_DeepLTS contains 30 individual synaptic connections
Network connection: NC3D_SupAxAx_L5TuftIB contains 400 individual synaptic connections
Network connection: NC3D_L23PyrFRB_SupAxAx contains 45 individual synaptic connections
Network connection: NC3D_L5TuftRS_DeepAxAx contains 100 individual synaptic connections
Network connection: NC3D_L23PyrRS_SupBask contains 810 individual synaptic connections
Network connection: NC3D_DeepAxAx_L4SpinStell contains 120 individual synaptic connections
Network connection: NC3D_SupLTS_SupLTS contains 180 individual synaptic connections
Network connection: NC3D_SupLTS_L23PyrFRB contains 100 individual synaptic connections
Network connection: NC3D_L4SpinStell_DeepLTS contains 200 individual synaptic connections
Network connection: NC3D_DeepLTS_DeepBask contains 200 individual synaptic connections
Network connection: NC3D_DeepLTS_SupBask contains 90 individual synaptic connections
Network connection: NC3D_SupAxAx_L6NonTuftRS contains 250 individual synaptic connections
Network connection: NC3D_L5TuftIB_L4SpinStell contains 480 individual synaptic connections
Network connection: NC3D_nRT_TCR contains 300 individual synaptic connections
Network connection: NC3D_DeepLTS_L5TuftIB contains 1600 individual synaptic connections
Network connection: NC3D_L4SpinStell_L4SpinStell_Gap contains 24 individual synaptic connections
Network connection: NC3D_DeepAxAx_L5TuftIB contains 400 individual synaptic connections
Network connection: NC3D_L6NonTuftRS_L23PyrRS contains 1000 individual synaptic connections
Network connection: NC3D_L5TuftIB_DeepBask contains 200 individual synaptic connections
Network connection: NC3D_L23PyrRS_L23PyrFRB contains 250 individual synaptic connections
Network connection: NC3D_DeepLTS_SupLTS contains 90 individual synaptic connections
Network connection: NC3D_L23PyrFRB_L23PyrFRB contains 25 individual synaptic connections
Network connection: NC3D_SupBask_L23PyrRS contains 2000 individual synaptic connections
Network connection: NC3D_L4SpinStell_SupAxAx contains 180 individual synaptic connections
Network connection: NC3D_DeepBask_DeepAxAx contains 200 individual synaptic connections
Network connection: NC3D_L4SpinStell_L23PyrRS contains 2000 individual synaptic connections
Network connection: NC3D_TCR_SupBask contains 90 individual synaptic connections
Network connection: NC3D_L23PyrRS_SupLTS contains 810 individual synaptic connections
Network connection: NC3D_L4SpinStell_L5TuftRS contains 400 individual synaptic connections
Network connection: NC3D_SupLTS_DeepAxAx contains 200 individual synaptic connections
Network connection: NC3D_TCR_L4SpinStell contains 480 individual synaptic connections
Network connection: NC3D_TCR_DeepBask contains 200 individual synaptic connections
Network connection: NC3D_L5TuftRS_L23PyrRS contains 200 individual synaptic connections
Network connection: NC3D_L23PyrFRB_DeepBask contains 30 individual synaptic connections
Network connection: NC3D_TCR_L5TuftIB contains 800 individual synaptic connections
Network connection: NC3D_DeepLTS_L23PyrFRB contains 50 individual synaptic connections
Network connection: NC3D_L5TuftRS_SupBask contains 90 individual synaptic connections
Network connection: NC3D_L5TuftRS_L5TuftRS contains 200 individual synaptic connections
Network connection: NC3D_L23PyrRS_L6NonTuftRS contains 150 individual synaptic connections
Network connection: NC3D_L6NonTuftRS_L5TuftRS contains 200 individual synaptic connections
Network connection: NC3D_L5TuftIB_L5TuftIB contains 4000 individual synaptic connections
Network connection: NC3D_L6NonTuftRS_L23PyrFRB contains 50 individual synaptic connections
Network connection: NC3D_SupLTS_SupBask contains 180 individual synaptic connections
Network connection: NC3D_DeepLTS_L6NonTuftRS contains 1000 individual synaptic connections
Network connection: NC3D_L6NonTuftRS_L4SpinStell contains 240 individual synaptic connections
Network connection: NC3D_L5TuftRS_L23PyrFRB contains 10 individual synaptic connections
Network connection: NC3D_L23PyrRS_DeepBask contains 300 individual synaptic connections
Network connection: NC3D_L23PyrRS_DeepLTS contains 300 individual synaptic connections
Network connection: NC3D_L4SpinStell_SupLTS contains 180 individual synaptic connections
Network connection: NC3D_L23PyrFRB_L4SpinStell contains 24 individual synaptic connections
Network connection: NC3D_DeepLTS_DeepLTS_Gap contains 26 individual synaptic connections
Network connection: NC3D_SupLTS_L23PyrRS contains 2000 individual synaptic connections
Network connection: NC3D_SupLTS_L6NonTuftRS contains 1000 individual synaptic connections
Network connection: NC3D_L23PyrFRB_SupLTS contains 45 individual synaptic connections
Network connection: NC3D_SupLTS_L5TuftRS contains 400 individual synaptic connections
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</notes>

    <include href="L23PyrRS.cell.nml"/>
    <include href="SupLTSInter.cell.nml"/>
    <include href="DeepAxAx.cell.nml"/>
    <include href="DeepLTSInter.cell.nml"/>
    <include href="L5TuftedPyrIB.cell.nml"/>
    <include href="L6NonTuftedPyrRS.cell.nml"/>
    <include href="SupBasket.cell.nml"/>
    <include href="TCR.cell.nml"/>
    <include href="DeepBasket.cell.nml"/>
    <include href="L4SpinyStellate.cell.nml"/>
    <include href="L5TuftedPyrRS.cell.nml"/>
    <include href="SupAxAx.cell.nml"/>
    <include href="L23PyrFRB_varInit.cell.nml"/>
    <include href="nRT.cell.nml"/>

    <pulseGenerator id="DepCurr_L6NT" delay="0.0s" duration="20.0s" amplitude="7.5E-11A"/>

    <pulseGenerator id="DepCurr_L6NT__0" delay="0.0s" duration="20.0s" amplitude="5.406968E-11A"/>

    <pulseGenerator id="DepCurr_L6NT__1" delay="0.0s" duration="20.0s" amplitude="8.650319E-11A"/>

    <pulseGenerator id="DepCurr_L6NT__2" delay="0.0s" duration="20.0s" amplitude="7.023539E-11A"/>

    <pulseGenerator id="DepCurr_L6NT__3" delay="0.0s" duration="20.0s" amplitude="5.749755E-11A"/>

    <pulseGenerator id="DepCurr_L6NT__4" delay="0.0s" duration="20.0s" amplitude="5.681847E-11A"/>

    <pulseGenerator id="DepCurr_L6NT__5" delay="0.0s" duration="20.0s" amplitude="7.677676E-11A"/>

    <pulseGenerator id="DepCurr_L6NT__6" delay="0.0s" duration="20.0s" amplitude="6.336422E-11A"/>

    <pulseGenerator id="DepCurr_L6NT__7" delay="0.0s" duration="20.0s" amplitude="8.336291E-11A"/>

    <pulseGenerator id="DepCurr_L6NT__8" delay="0.0s" duration="20.0s" amplitude="5.756858E-11A"/>

    <pulseGenerator id="DepCurr_L6NT__9" delay="0.0s" duration="20.0s" amplitude="9.150648E-11A"/>

    <pulseGenerator id="DepCurr_L6NT__10" delay="0.0s" duration="20.0s" amplitude="7.097663E-11A"/>

    <pulseGenerator id="DepCurr_L6NT__11" delay="0.0s" duration="20.0s" amplitude="9.626248E-11A"/>

    <pulseGenerator id="DepCurr_L6NT__12" delay="0.0s" duration="20.0s" amplitude="5.152515E-11A"/>

    <pulseGenerator id="DepCurr_L6NT__13" delay="0.0s" duration="20.0s" amplitude="7.046888E-11A"/>

    <pulseGenerator id="DepCurr_L6NT__14" delay="0.0s" duration="20.0s" amplitude="7.09638E-11A"/>

    <pulseGenerator id="DepCurr_L6NT__15" delay="0.0s" duration="20.0s" amplitude="6.913917E-11A"/>

    <pulseGenerator id="DepCurr_L6NT__16" delay="0.0s" duration="20.0s" amplitude="6.813456E-11A"/>

    <pulseGenerator id="DepCurr_L6NT__17" delay="0.0s" duration="20.0s" amplitude="7.072148E-11A"/>

    <pulseGenerator id="DepCurr_L6NT__18" delay="0.0s" duration="20.0s" amplitude="6.940183E-11A"/>

    <pulseGenerator id="DepCurr_L6NT__19" delay="0.0s" duration="20.0s" amplitude="9.534229E-11A"/>

    <pulseGenerator id="DepCurr_L6NT__20" delay="0.0s" duration="20.0s" amplitude="5.909677E-11A"/>

    <pulseGenerator id="DepCurr_L6NT__21" delay="0.0s" duration="20.0s" amplitude="9.428971E-11A"/>

    <pulseGenerator id="DepCurr_L6NT__22" delay="0.0s" duration="20.0s" amplitude="9.620315E-11A"/>

    <pulseGenerator id="DepCurr_L6NT__23" delay="0.0s" duration="20.0s" amplitude="9.718404E-11A"/>

    <pulseGenerator id="DepCurr_L6NT__24" delay="0.0s" duration="20.0s" amplitude="6.073652E-11A"/>

    <pulseGenerator id="DepCurr_L6NT__25" delay="0.0s" duration="20.0s" amplitude="5.074881E-11A"/>

    <pulseGenerator id="DepCurr_L6NT__26" delay="0.0s" duration="20.0s" amplitude="7.830662E-11A"/>

    <pulseGenerator id="DepCurr_L6NT__27" delay="0.0s" duration="20.0s" amplitude="7.197918E-11A"/>

    <pulseGenerator id="DepCurr_L6NT__28" delay="0.0s" duration="20.0s" amplitude="9.556585E-11A"/>

    <pulseGenerator id="DepCurr_L6NT__29" delay="0.0s" duration="20.0s" amplitude="9.235952E-11A"/>

    <pulseGenerator id="DepCurr_L6NT__30" delay="0.0s" duration="20.0s" amplitude="9.340633E-11A"/>

    <pulseGenerator id="DepCurr_L6NT__31" delay="0.0s" duration="20.0s" amplitude="6.075819E-11A"/>

    <pulseGenerator id="DepCurr_L6NT__32" delay="0.0s" duration="20.0s" amplitude="8.287127E-11A"/>

    <pulseGenerator id="DepCurr_L6NT__33" delay="0.0s" duration="20.0s" amplitude="7.867417E-11A"/>

    <pulseGenerator id="DepCurr_L6NT__34" delay="0.0s" duration="20.0s" amplitude="8.557388E-11A"/>

    <pulseGenerator id="DepCurr_L6NT__35" delay="0.0s" duration="20.0s" amplitude="9.823601E-11A"/>

    <pulseGenerator id="DepCurr_L6NT__36" delay="0.0s" duration="20.0s" amplitude="9.379594E-11A"/>

    <pulseGenerator id="DepCurr_L6NT__37" delay="0.0s" duration="20.0s" amplitude="6.698221E-11A"/>

    <pulseGenerator id="DepCurr_L6NT__38" delay="0.0s" duration="20.0s" amplitude="9.576063E-11A"/>

    <pulseGenerator id="DepCurr_L6NT__39" delay="0.0s" duration="20.0s" amplitude="9.163849E-11A"/>

    <pulseGenerator id="DepCurr_L6NT__40" delay="0.0s" duration="20.0s" amplitude="8.516862E-11A"/>

    <pulseGenerator id="DepCurr_L6NT__41" delay="0.0s" duration="20.0s" amplitude="6.317329E-11A"/>

    <pulseGenerator id="DepCurr_L6NT__42" delay="0.0s" duration="20.0s" amplitude="6.360081E-11A"/>

    <pulseGenerator id="DepCurr_L6NT__43" delay="0.0s" duration="20.0s" amplitude="5.490417E-11A"/>

    <pulseGenerator id="DepCurr_L6NT__44" delay="0.0s" duration="20.0s" amplitude="9.84244E-11A"/>

    <pulseGenerator id="DepCurr_L6NT__45" delay="0.0s" duration="20.0s" amplitude="7.765998E-11A"/>

    <pulseGenerator id="DepCurr_L6NT__46" delay="0.0s" duration="20.0s" amplitude="8.460444E-11A"/>

    <pulseGenerator id="DepCurr_L6NT__47" delay="0.0s" duration="20.0s" amplitude="9.363926E-11A"/>

    <pulseGenerator id="DepCurr_L6NT__48" delay="0.0s" duration="20.0s" amplitude="9.568836E-11A"/>

    <pulseGenerator id="DepCurr_L6NT__49" delay="0.0s" duration="20.0s" amplitude="9.304562E-11A"/>

    <pulseGenerator id="DepCurr_L23FRB" delay="0.0s" duration="20.0s" amplitude="3.0E-10A"/>

    <pulseGenerator id="DepCurr_L23FRB__0" delay="0.0s" duration="20.0s" amplitude="2.539487E-10A"/>

    <pulseGenerator id="DepCurr_L23FRB__1" delay="0.0s" duration="20.0s" amplitude="2.857115E-10A"/>

    <pulseGenerator id="DepCurr_L23FRB__2" delay="0.0s" duration="20.0s" amplitude="2.951434E-10A"/>

    <pulseGenerator id="DepCurr_L23FRB__3" delay="0.0s" duration="20.0s" amplitude="2.761244E-10A"/>

    <pulseGenerator id="DepCurr_L23FRB__4" delay="0.0s" duration="20.0s" amplitude="3.293416E-10A"/>

    <pulseGenerator id="DepCurr_L5IB" delay="0.0s" duration="20.0s" amplitude="7.5E-11A"/>

    <pulseGenerator id="DepCurr_L5IB__0" delay="0.0s" duration="20.0s" amplitude="5.191776E-11A"/>

    <pulseGenerator id="DepCurr_L5IB__1" delay="0.0s" duration="20.0s" amplitude="6.879376E-11A"/>

    <pulseGenerator id="DepCurr_L5IB__2" delay="0.0s" duration="20.0s" amplitude="7.230023E-11A"/>

    <pulseGenerator id="DepCurr_L5IB__3" delay="0.0s" duration="20.0s" amplitude="9.01812E-11A"/>

    <pulseGenerator id="DepCurr_L5IB__4" delay="0.0s" duration="20.0s" amplitude="5.65304E-11A"/>

    <pulseGenerator id="DepCurr_L5IB__5" delay="0.0s" duration="20.0s" amplitude="9.020586E-11A"/>

    <pulseGenerator id="DepCurr_L5IB__6" delay="0.0s" duration="20.0s" amplitude="8.352385E-11A"/>

    <pulseGenerator id="DepCurr_L5IB__7" delay="0.0s" duration="20.0s" amplitude="8.658865E-11A"/>

    <pulseGenerator id="DepCurr_L5IB__8" delay="0.0s" duration="20.0s" amplitude="7.679065E-11A"/>

    <pulseGenerator id="DepCurr_L5IB__9" delay="0.0s" duration="20.0s" amplitude="9.537829E-11A"/>

    <pulseGenerator id="DepCurr_L5IB__10" delay="0.0s" duration="20.0s" amplitude="5.608446E-11A"/>

    <pulseGenerator id="DepCurr_L5IB__11" delay="0.0s" duration="20.0s" amplitude="7.669763E-11A"/>

    <pulseGenerator id="DepCurr_L5IB__12" delay="0.0s" duration="20.0s" amplitude="5.998027E-11A"/>

    <pulseGenerator id="DepCurr_L5IB__13" delay="0.0s" duration="20.0s" amplitude="7.137679E-11A"/>

    <pulseGenerator id="DepCurr_L5IB__14" delay="0.0s" duration="20.0s" amplitude="8.700871E-11A"/>

    <pulseGenerator id="DepCurr_L5IB__15" delay="0.0s" duration="20.0s" amplitude="7.999616E-11A"/>

    <pulseGenerator id="DepCurr_L5IB__16" delay="0.0s" duration="20.0s" amplitude="6.877435E-11A"/>

    <pulseGenerator id="DepCurr_L5IB__17" delay="0.0s" duration="20.0s" amplitude="5.324809E-11A"/>

    <pulseGenerator id="DepCurr_L5IB__18" delay="0.0s" duration="20.0s" amplitude="7.976256E-11A"/>

    <pulseGenerator id="DepCurr_L5IB__19" delay="0.0s" duration="20.0s" amplitude="6.404486E-11A"/>

    <pulseGenerator id="DepCurr_L5IB__20" delay="0.0s" duration="20.0s" amplitude="6.653564E-11A"/>

    <pulseGenerator id="DepCurr_L5IB__21" delay="0.0s" duration="20.0s" amplitude="8.319662E-11A"/>

    <pulseGenerator id="DepCurr_L5IB__22" delay="0.0s" duration="20.0s" amplitude="9.796505E-11A"/>

    <pulseGenerator id="DepCurr_L5IB__23" delay="0.0s" duration="20.0s" amplitude="9.376005E-11A"/>

    <pulseGenerator id="DepCurr_L5IB__24" delay="0.0s" duration="20.0s" amplitude="8.007783E-11A"/>

    <pulseGenerator id="DepCurr_L5IB__25" delay="0.0s" duration="20.0s" amplitude="9.229212E-11A"/>

    <pulseGenerator id="DepCurr_L5IB__26" delay="0.0s" duration="20.0s" amplitude="5.995892E-11A"/>

    <pulseGenerator id="DepCurr_L5IB__27" delay="0.0s" duration="20.0s" amplitude="9.256373E-11A"/>

    <pulseGenerator id="DepCurr_L5IB__28" delay="0.0s" duration="20.0s" amplitude="6.935015E-11A"/>

    <pulseGenerator id="DepCurr_L5IB__29" delay="0.0s" duration="20.0s" amplitude="6.260876E-11A"/>

    <pulseGenerator id="DepCurr_L5IB__30" delay="0.0s" duration="20.0s" amplitude="8.958605E-11A"/>

    <pulseGenerator id="DepCurr_L5IB__31" delay="0.0s" duration="20.0s" amplitude="9.583776E-11A"/>

    <pulseGenerator id="DepCurr_L5IB__32" delay="0.0s" duration="20.0s" amplitude="8.125502E-11A"/>

    <pulseGenerator id="DepCurr_L5IB__33" delay="0.0s" duration="20.0s" amplitude="5.915888E-11A"/>

    <pulseGenerator id="DepCurr_L5IB__34" delay="0.0s" duration="20.0s" amplitude="6.741659E-11A"/>

    <pulseGenerator id="DepCurr_L5IB__35" delay="0.0s" duration="20.0s" amplitude="7.411594E-11A"/>

    <pulseGenerator id="DepCurr_L5IB__36" delay="0.0s" duration="20.0s" amplitude="8.624235E-11A"/>

    <pulseGenerator id="DepCurr_L5IB__37" delay="0.0s" duration="20.0s" amplitude="6.8685E-11A"/>

    <pulseGenerator id="DepCurr_L5IB__38" delay="0.0s" duration="20.0s" amplitude="9.275554E-11A"/>

    <pulseGenerator id="DepCurr_L5IB__39" delay="0.0s" duration="20.0s" amplitude="7.579079E-11A"/>

    <pulseGenerator id="DepCurr_L5IB__40" delay="0.0s" duration="20.0s" amplitude="8.503207E-11A"/>

    <pulseGenerator id="DepCurr_L5IB__41" delay="0.0s" duration="20.0s" amplitude="7.409607E-11A"/>

    <pulseGenerator id="DepCurr_L5IB__42" delay="0.0s" duration="20.0s" amplitude="7.336735E-11A"/>

    <pulseGenerator id="DepCurr_L5IB__43" delay="0.0s" duration="20.0s" amplitude="7.903409E-11A"/>

    <pulseGenerator id="DepCurr_L5IB__44" delay="0.0s" duration="20.0s" amplitude="5.756021E-11A"/>

    <pulseGenerator id="DepCurr_L5IB__45" delay="0.0s" duration="20.0s" amplitude="8.889247E-11A"/>

    <pulseGenerator id="DepCurr_L5IB__46" delay="0.0s" duration="20.0s" amplitude="5.17947E-11A"/>

    <pulseGenerator id="DepCurr_L5IB__47" delay="0.0s" duration="20.0s" amplitude="5.565318E-11A"/>

    <pulseGenerator id="DepCurr_L5IB__48" delay="0.0s" duration="20.0s" amplitude="8.343923E-11A"/>

    <pulseGenerator id="DepCurr_L5IB__49" delay="0.0s" duration="20.0s" amplitude="7.966405E-11A"/>

    <pulseGenerator id="DepCurr_L5IB__50" delay="0.0s" duration="20.0s" amplitude="5.308184E-11A"/>

    <pulseGenerator id="DepCurr_L5IB__51" delay="0.0s" duration="20.0s" amplitude="6.702399E-11A"/>

    <pulseGenerator id="DepCurr_L5IB__52" delay="0.0s" duration="20.0s" amplitude="7.94428E-11A"/>

    <pulseGenerator id="DepCurr_L5IB__53" delay="0.0s" duration="20.0s" amplitude="7.804464E-11A"/>

    <pulseGenerator id="DepCurr_L5IB__54" delay="0.0s" duration="20.0s" amplitude="6.373578E-11A"/>

    <pulseGenerator id="DepCurr_L5IB__55" delay="0.0s" duration="20.0s" amplitude="5.363956E-11A"/>

    <pulseGenerator id="DepCurr_L5IB__56" delay="0.0s" duration="20.0s" amplitude="8.399747E-11A"/>

    <pulseGenerator id="DepCurr_L5IB__57" delay="0.0s" duration="20.0s" amplitude="5.727208E-11A"/>

    <pulseGenerator id="DepCurr_L5IB__58" delay="0.0s" duration="20.0s" amplitude="6.986216E-11A"/>

    <pulseGenerator id="DepCurr_L5IB__59" delay="0.0s" duration="20.0s" amplitude="6.554851E-11A"/>

    <pulseGenerator id="DepCurr_L5IB__60" delay="0.0s" duration="20.0s" amplitude="6.577293E-11A"/>

    <pulseGenerator id="DepCurr_L5IB__61" delay="0.0s" duration="20.0s" amplitude="8.567502E-11A"/>

    <pulseGenerator id="DepCurr_L5IB__62" delay="0.0s" duration="20.0s" amplitude="7.89989E-11A"/>

    <pulseGenerator id="DepCurr_L5IB__63" delay="0.0s" duration="20.0s" amplitude="9.467649E-11A"/>

    <pulseGenerator id="DepCurr_L5IB__64" delay="0.0s" duration="20.0s" amplitude="8.525036E-11A"/>

    <pulseGenerator id="DepCurr_L5IB__65" delay="0.0s" duration="20.0s" amplitude="7.745671E-11A"/>

    <pulseGenerator id="DepCurr_L5IB__66" delay="0.0s" duration="20.0s" amplitude="6.454534E-11A"/>

    <pulseGenerator id="DepCurr_L5IB__67" delay="0.0s" duration="20.0s" amplitude="7.114617E-11A"/>

    <pulseGenerator id="DepCurr_L5IB__68" delay="0.0s" duration="20.0s" amplitude="9.681178E-11A"/>

    <pulseGenerator id="DepCurr_L5IB__69" delay="0.0s" duration="20.0s" amplitude="5.457468E-11A"/>

    <pulseGenerator id="DepCurr_L5IB__70" delay="0.0s" duration="20.0s" amplitude="5.956109E-11A"/>

    <pulseGenerator id="DepCurr_L5IB__71" delay="0.0s" duration="20.0s" amplitude="7.194547E-11A"/>

    <pulseGenerator id="DepCurr_L5IB__72" delay="0.0s" duration="20.0s" amplitude="6.928578E-11A"/>

    <pulseGenerator id="DepCurr_L5IB__73" delay="0.0s" duration="20.0s" amplitude="9.635511E-11A"/>

    <pulseGenerator id="DepCurr_L5IB__74" delay="0.0s" duration="20.0s" amplitude="7.270551E-11A"/>

    <pulseGenerator id="DepCurr_L5IB__75" delay="0.0s" duration="20.0s" amplitude="6.012414E-11A"/>

    <pulseGenerator id="DepCurr_L5IB__76" delay="0.0s" duration="20.0s" amplitude="8.501633E-11A"/>

    <pulseGenerator id="DepCurr_L5IB__77" delay="0.0s" duration="20.0s" amplitude="5.17984E-11A"/>

    <pulseGenerator id="DepCurr_L5IB__78" delay="0.0s" duration="20.0s" amplitude="7.923231E-11A"/>

    <pulseGenerator id="DepCurr_L5IB__79" delay="0.0s" duration="20.0s" amplitude="8.789372E-11A"/>

    <pulseGenerator id="DepCurr_L5RS" delay="0.0s" duration="20.0s" amplitude="7.5E-11A"/>

    <pulseGenerator id="DepCurr_L5RS__0" delay="0.0s" duration="20.0s" amplitude="5.905778E-11A"/>

    <pulseGenerator id="DepCurr_L5RS__1" delay="0.0s" duration="20.0s" amplitude="8.392157E-11A"/>

    <pulseGenerator id="DepCurr_L5RS__2" delay="0.0s" duration="20.0s" amplitude="8.417439E-11A"/>

    <pulseGenerator id="DepCurr_L5RS__3" delay="0.0s" duration="20.0s" amplitude="9.511374E-11A"/>

    <pulseGenerator id="DepCurr_L5RS__4" delay="0.0s" duration="20.0s" amplitude="6.886258E-11A"/>

    <pulseGenerator id="DepCurr_L5RS__5" delay="0.0s" duration="20.0s" amplitude="7.357201E-11A"/>

    <pulseGenerator id="DepCurr_L5RS__6" delay="0.0s" duration="20.0s" amplitude="5.949073E-11A"/>

    <pulseGenerator id="DepCurr_L5RS__7" delay="0.0s" duration="20.0s" amplitude="9.149905E-11A"/>

    <pulseGenerator id="DepCurr_L5RS__8" delay="0.0s" duration="20.0s" amplitude="9.129734E-11A"/>

    <pulseGenerator id="DepCurr_L5RS__9" delay="0.0s" duration="20.0s" amplitude="6.909404E-11A"/>

    <pulseGenerator id="DepCurr_L5RS__10" delay="0.0s" duration="20.0s" amplitude="9.72435E-11A"/>

    <pulseGenerator id="DepCurr_L5RS__11" delay="0.0s" duration="20.0s" amplitude="5.308829E-11A"/>

    <pulseGenerator id="DepCurr_L5RS__12" delay="0.0s" duration="20.0s" amplitude="8.363251E-11A"/>

    <pulseGenerator id="DepCurr_L5RS__13" delay="0.0s" duration="20.0s" amplitude="9.722228E-11A"/>

    <pulseGenerator id="DepCurr_L5RS__14" delay="0.0s" duration="20.0s" amplitude="6.348015E-11A"/>

    <pulseGenerator id="DepCurr_L5RS__15" delay="0.0s" duration="20.0s" amplitude="8.09675E-11A"/>

    <pulseGenerator id="DepCurr_L5RS__16" delay="0.0s" duration="20.0s" amplitude="9.159212E-11A"/>

    <pulseGenerator id="DepCurr_L5RS__17" delay="0.0s" duration="20.0s" amplitude="6.333779E-11A"/>

    <pulseGenerator id="DepCurr_L5RS__18" delay="0.0s" duration="20.0s" amplitude="5.296839E-11A"/>

    <pulseGenerator id="DepCurr_L5RS__19" delay="0.0s" duration="20.0s" amplitude="7.861672E-11A"/>

    <pulseGenerator id="DepCurr_L23RS" delay="0.0s" duration="20.0s" amplitude="7.5E-11A"/>

    <pulseGenerator id="DepCurr_L23RS__0" delay="0.0s" duration="20.0s" amplitude="7.259627E-11A"/>

    <pulseGenerator id="DepCurr_L23RS__1" delay="0.0s" duration="20.0s" amplitude="7.190504E-11A"/>

    <pulseGenerator id="DepCurr_L23RS__2" delay="0.0s" duration="20.0s" amplitude="5.694686E-11A"/>

    <pulseGenerator id="DepCurr_L23RS__3" delay="0.0s" duration="20.0s" amplitude="8.718977E-11A"/>

    <pulseGenerator id="DepCurr_L23RS__4" delay="0.0s" duration="20.0s" amplitude="9.035932E-11A"/>

    <pulseGenerator id="DepCurr_L23RS__5" delay="0.0s" duration="20.0s" amplitude="7.230663E-11A"/>

    <pulseGenerator id="DepCurr_L23RS__6" delay="0.0s" duration="20.0s" amplitude="9.773265E-11A"/>

    <pulseGenerator id="DepCurr_L23RS__7" delay="0.0s" duration="20.0s" amplitude="5.167294E-11A"/>

    <pulseGenerator id="DepCurr_L23RS__8" delay="0.0s" duration="20.0s" amplitude="8.369637E-11A"/>

    <pulseGenerator id="DepCurr_L23RS__9" delay="0.0s" duration="20.0s" amplitude="9.487139E-11A"/>

    <pulseGenerator id="DepCurr_L23RS__10" delay="0.0s" duration="20.0s" amplitude="7.648128E-11A"/>

    <pulseGenerator id="DepCurr_L23RS__11" delay="0.0s" duration="20.0s" amplitude="6.156205E-11A"/>

    <pulseGenerator id="DepCurr_L23RS__12" delay="0.0s" duration="20.0s" amplitude="8.930328E-11A"/>

    <pulseGenerator id="DepCurr_L23RS__13" delay="0.0s" duration="20.0s" amplitude="7.169574E-11A"/>

    <pulseGenerator id="DepCurr_L23RS__14" delay="0.0s" duration="20.0s" amplitude="6.537005E-11A"/>

    <pulseGenerator id="DepCurr_L23RS__15" delay="0.0s" duration="20.0s" amplitude="8.392031E-11A"/>

    <pulseGenerator id="DepCurr_L23RS__16" delay="0.0s" duration="20.0s" amplitude="8.491054E-11A"/>

    <pulseGenerator id="DepCurr_L23RS__17" delay="0.0s" duration="20.0s" amplitude="7.030605E-11A"/>

    <pulseGenerator id="DepCurr_L23RS__18" delay="0.0s" duration="20.0s" amplitude="7.440936E-11A"/>

    <pulseGenerator id="DepCurr_L23RS__19" delay="0.0s" duration="20.0s" amplitude="6.900902E-11A"/>

    <pulseGenerator id="DepCurr_L23RS__20" delay="0.0s" duration="20.0s" amplitude="5.707793E-11A"/>

    <pulseGenerator id="DepCurr_L23RS__21" delay="0.0s" duration="20.0s" amplitude="8.279246E-11A"/>

    <pulseGenerator id="DepCurr_L23RS__22" delay="0.0s" duration="20.0s" amplitude="5.487154E-11A"/>

    <pulseGenerator id="DepCurr_L23RS__23" delay="0.0s" duration="20.0s" amplitude="5.287038E-11A"/>

    <pulseGenerator id="DepCurr_L23RS__24" delay="0.0s" duration="20.0s" amplitude="7.792899E-11A"/>

    <pulseGenerator id="DepCurr_L23RS__25" delay="0.0s" duration="20.0s" amplitude="5.619573E-11A"/>

    <pulseGenerator id="DepCurr_L23RS__26" delay="0.0s" duration="20.0s" amplitude="8.7844E-11A"/>

    <pulseGenerator id="DepCurr_L23RS__27" delay="0.0s" duration="20.0s" amplitude="9.058365E-11A"/>

    <pulseGenerator id="DepCurr_L23RS__28" delay="0.0s" duration="20.0s" amplitude="8.675635E-11A"/>

    <pulseGenerator id="DepCurr_L23RS__29" delay="0.0s" duration="20.0s" amplitude="9.705821E-11A"/>

    <pulseGenerator id="DepCurr_L23RS__30" delay="0.0s" duration="20.0s" amplitude="8.957646E-11A"/>

    <pulseGenerator id="DepCurr_L23RS__31" delay="0.0s" duration="20.0s" amplitude="5.460518E-11A"/>

    <pulseGenerator id="DepCurr_L23RS__32" delay="0.0s" duration="20.0s" amplitude="5.118515E-11A"/>

    <pulseGenerator id="DepCurr_L23RS__33" delay="0.0s" duration="20.0s" amplitude="7.909137E-11A"/>

    <pulseGenerator id="DepCurr_L23RS__34" delay="0.0s" duration="20.0s" amplitude="5.04094E-11A"/>

    <pulseGenerator id="DepCurr_L23RS__35" delay="0.0s" duration="20.0s" amplitude="8.062843E-11A"/>

    <pulseGenerator id="DepCurr_L23RS__36" delay="0.0s" duration="20.0s" amplitude="7.080186E-11A"/>

    <pulseGenerator id="DepCurr_L23RS__37" delay="0.0s" duration="20.0s" amplitude="7.141148E-11A"/>

    <pulseGenerator id="DepCurr_L23RS__38" delay="0.0s" duration="20.0s" amplitude="7.941863E-11A"/>

    <pulseGenerator id="DepCurr_L23RS__39" delay="0.0s" duration="20.0s" amplitude="9.494466E-11A"/>

    <pulseGenerator id="DepCurr_L23RS__40" delay="0.0s" duration="20.0s" amplitude="8.759801E-11A"/>

    <pulseGenerator id="DepCurr_L23RS__41" delay="0.0s" duration="20.0s" amplitude="7.056851E-11A"/>

    <pulseGenerator id="DepCurr_L23RS__42" delay="0.0s" duration="20.0s" amplitude="7.226387E-11A"/>

    <pulseGenerator id="DepCurr_L23RS__43" delay="0.0s" duration="20.0s" amplitude="9.28653E-11A"/>

    <pulseGenerator id="DepCurr_L23RS__44" delay="0.0s" duration="20.0s" amplitude="8.366127E-11A"/>

    <pulseGenerator id="DepCurr_L23RS__45" delay="0.0s" duration="20.0s" amplitude="9.198571E-11A"/>

    <pulseGenerator id="DepCurr_L23RS__46" delay="0.0s" duration="20.0s" amplitude="7.876965E-11A"/>

    <pulseGenerator id="DepCurr_L23RS__47" delay="0.0s" duration="20.0s" amplitude="6.36832E-11A"/>

    <pulseGenerator id="DepCurr_L23RS__48" delay="0.0s" duration="20.0s" amplitude="8.883949E-11A"/>

    <pulseGenerator id="DepCurr_L23RS__49" delay="0.0s" duration="20.0s" amplitude="9.181587E-11A"/>

    <pulseGenerator id="DepCurr_L23RS__50" delay="0.0s" duration="20.0s" amplitude="5.958201E-11A"/>

    <pulseGenerator id="DepCurr_L23RS__51" delay="0.0s" duration="20.0s" amplitude="6.848036E-11A"/>

    <pulseGenerator id="DepCurr_L23RS__52" delay="0.0s" duration="20.0s" amplitude="7.383745E-11A"/>

    <pulseGenerator id="DepCurr_L23RS__53" delay="0.0s" duration="20.0s" amplitude="5.451366E-11A"/>

    <pulseGenerator id="DepCurr_L23RS__54" delay="0.0s" duration="20.0s" amplitude="5.682894E-11A"/>

    <pulseGenerator id="DepCurr_L23RS__55" delay="0.0s" duration="20.0s" amplitude="6.819732E-11A"/>

    <pulseGenerator id="DepCurr_L23RS__56" delay="0.0s" duration="20.0s" amplitude="8.676451E-11A"/>

    <pulseGenerator id="DepCurr_L23RS__57" delay="0.0s" duration="20.0s" amplitude="8.255996E-11A"/>

    <pulseGenerator id="DepCurr_L23RS__58" delay="0.0s" duration="20.0s" amplitude="7.246654E-11A"/>

    <pulseGenerator id="DepCurr_L23RS__59" delay="0.0s" duration="20.0s" amplitude="7.940597E-11A"/>

    <pulseGenerator id="DepCurr_L23RS__60" delay="0.0s" duration="20.0s" amplitude="7.057595E-11A"/>

    <pulseGenerator id="DepCurr_L23RS__61" delay="0.0s" duration="20.0s" amplitude="9.522634E-11A"/>

    <pulseGenerator id="DepCurr_L23RS__62" delay="0.0s" duration="20.0s" amplitude="6.422307E-11A"/>

    <pulseGenerator id="DepCurr_L23RS__63" delay="0.0s" duration="20.0s" amplitude="8.859654E-11A"/>

    <pulseGenerator id="DepCurr_L23RS__64" delay="0.0s" duration="20.0s" amplitude="5.233836E-11A"/>

    <pulseGenerator id="DepCurr_L23RS__65" delay="0.0s" duration="20.0s" amplitude="7.253499E-11A"/>

    <pulseGenerator id="DepCurr_L23RS__66" delay="0.0s" duration="20.0s" amplitude="6.34724E-11A"/>

    <pulseGenerator id="DepCurr_L23RS__67" delay="0.0s" duration="20.0s" amplitude="5.520714E-11A"/>

    <pulseGenerator id="DepCurr_L23RS__68" delay="0.0s" duration="20.0s" amplitude="7.265357E-11A"/>

    <pulseGenerator id="DepCurr_L23RS__69" delay="0.0s" duration="20.0s" amplitude="7.768814E-11A"/>

    <pulseGenerator id="DepCurr_L23RS__70" delay="0.0s" duration="20.0s" amplitude="5.159572E-11A"/>

    <pulseGenerator id="DepCurr_L23RS__71" delay="0.0s" duration="20.0s" amplitude="5.257568E-11A"/>

    <pulseGenerator id="DepCurr_L23RS__72" delay="0.0s" duration="20.0s" amplitude="5.990621E-11A"/>

    <pulseGenerator id="DepCurr_L23RS__73" delay="0.0s" duration="20.0s" amplitude="9.727234E-11A"/>

    <pulseGenerator id="DepCurr_L23RS__74" delay="0.0s" duration="20.0s" amplitude="5.245171E-11A"/>

    <pulseGenerator id="DepCurr_L23RS__75" delay="0.0s" duration="20.0s" amplitude="7.12474E-11A"/>

    <pulseGenerator id="DepCurr_L23RS__76" delay="0.0s" duration="20.0s" amplitude="8.192326E-11A"/>

    <pulseGenerator id="DepCurr_L23RS__77" delay="0.0s" duration="20.0s" amplitude="8.908513E-11A"/>

    <pulseGenerator id="DepCurr_L23RS__78" delay="0.0s" duration="20.0s" amplitude="6.340168E-11A"/>

    <pulseGenerator id="DepCurr_L23RS__79" delay="0.0s" duration="20.0s" amplitude="5.317574E-11A"/>

    <pulseGenerator id="DepCurr_L23RS__80" delay="0.0s" duration="20.0s" amplitude="6.99712E-11A"/>

    <pulseGenerator id="DepCurr_L23RS__81" delay="0.0s" duration="20.0s" amplitude="6.511033E-11A"/>

    <pulseGenerator id="DepCurr_L23RS__82" delay="0.0s" duration="20.0s" amplitude="7.72656E-11A"/>

    <pulseGenerator id="DepCurr_L23RS__83" delay="0.0s" duration="20.0s" amplitude="8.913888E-11A"/>

    <pulseGenerator id="DepCurr_L23RS__84" delay="0.0s" duration="20.0s" amplitude="7.224767E-11A"/>

    <pulseGenerator id="DepCurr_L23RS__85" delay="0.0s" duration="20.0s" amplitude="7.414195E-11A"/>

    <pulseGenerator id="DepCurr_L23RS__86" delay="0.0s" duration="20.0s" amplitude="9.286208E-11A"/>

    <pulseGenerator id="DepCurr_L23RS__87" delay="0.0s" duration="20.0s" amplitude="9.677166E-11A"/>

    <pulseGenerator id="DepCurr_L23RS__88" delay="0.0s" duration="20.0s" amplitude="5.678301E-11A"/>

    <pulseGenerator id="DepCurr_L23RS__89" delay="0.0s" duration="20.0s" amplitude="7.901476E-11A"/>

    <pulseGenerator id="DepCurr_L23RS__90" delay="0.0s" duration="20.0s" amplitude="6.405953E-11A"/>

    <pulseGenerator id="DepCurr_L23RS__91" delay="0.0s" duration="20.0s" amplitude="6.787425E-11A"/>

    <pulseGenerator id="DepCurr_L23RS__92" delay="0.0s" duration="20.0s" amplitude="9.524523E-11A"/>

    <pulseGenerator id="DepCurr_L23RS__93" delay="0.0s" duration="20.0s" amplitude="8.606347E-11A"/>

    <pulseGenerator id="DepCurr_L23RS__94" delay="0.0s" duration="20.0s" amplitude="9.209485E-11A"/>

    <pulseGenerator id="DepCurr_L23RS__95" delay="0.0s" duration="20.0s" amplitude="7.17793E-11A"/>

    <pulseGenerator id="DepCurr_L23RS__96" delay="0.0s" duration="20.0s" amplitude="7.798552E-11A"/>

    <pulseGenerator id="DepCurr_L23RS__97" delay="0.0s" duration="20.0s" amplitude="7.505257E-11A"/>

    <pulseGenerator id="DepCurr_L23RS__98" delay="0.0s" duration="20.0s" amplitude="8.526178E-11A"/>

    <pulseGenerator id="DepCurr_L23RS__99" delay="0.0s" duration="20.0s" amplitude="5.549307E-11A"/>

    <pulseGenerator id="DepCurr_L4SS" delay="0.0s" duration="20.0s" amplitude="7.5E-11A"/>

    <pulseGenerator id="DepCurr_L4SS__0" delay="0.0s" duration="20.0s" amplitude="6.787579E-11A"/>

    <pulseGenerator id="DepCurr_L4SS__1" delay="0.0s" duration="20.0s" amplitude="6.168026E-11A"/>

    <pulseGenerator id="DepCurr_L4SS__2" delay="0.0s" duration="20.0s" amplitude="8.480367E-11A"/>

    <pulseGenerator id="DepCurr_L4SS__3" delay="0.0s" duration="20.0s" amplitude="7.08102E-11A"/>

    <pulseGenerator id="DepCurr_L4SS__4" delay="0.0s" duration="20.0s" amplitude="6.233233E-11A"/>

    <pulseGenerator id="DepCurr_L4SS__5" delay="0.0s" duration="20.0s" amplitude="9.917541E-11A"/>

    <pulseGenerator id="DepCurr_L4SS__6" delay="0.0s" duration="20.0s" amplitude="6.823961E-11A"/>

    <pulseGenerator id="DepCurr_L4SS__7" delay="0.0s" duration="20.0s" amplitude="7.665265E-11A"/>

    <pulseGenerator id="DepCurr_L4SS__8" delay="0.0s" duration="20.0s" amplitude="6.330916E-11A"/>

    <pulseGenerator id="DepCurr_L4SS__9" delay="0.0s" duration="20.0s" amplitude="8.232296E-11A"/>

    <pulseGenerator id="DepCurr_L4SS__10" delay="0.0s" duration="20.0s" amplitude="7.758988E-11A"/>

    <pulseGenerator id="DepCurr_L4SS__11" delay="0.0s" duration="20.0s" amplitude="8.030148E-11A"/>

    <pulseGenerator id="DepCurr_L4SS__12" delay="0.0s" duration="20.0s" amplitude="7.80509E-11A"/>

    <pulseGenerator id="DepCurr_L4SS__13" delay="0.0s" duration="20.0s" amplitude="5.534682E-11A"/>

    <pulseGenerator id="DepCurr_L4SS__14" delay="0.0s" duration="20.0s" amplitude="8.263632E-11A"/>

    <pulseGenerator id="DepCurr_L4SS__15" delay="0.0s" duration="20.0s" amplitude="5.105386E-11A"/>

    <pulseGenerator id="DepCurr_L4SS__16" delay="0.0s" duration="20.0s" amplitude="8.574796E-11A"/>

    <pulseGenerator id="DepCurr_L4SS__17" delay="0.0s" duration="20.0s" amplitude="6.285876E-11A"/>

    <pulseGenerator id="DepCurr_L4SS__18" delay="0.0s" duration="20.0s" amplitude="5.994659E-11A"/>

    <pulseGenerator id="DepCurr_L4SS__19" delay="0.0s" duration="20.0s" amplitude="7.200971E-11A"/>

    <pulseGenerator id="DepCurr_L4SS__20" delay="0.0s" duration="20.0s" amplitude="8.882101E-11A"/>

    <pulseGenerator id="DepCurr_L4SS__21" delay="0.0s" duration="20.0s" amplitude="7.098641E-11A"/>

    <pulseGenerator id="DepCurr_L4SS__22" delay="0.0s" duration="20.0s" amplitude="6.981194E-11A"/>

    <pulseGenerator id="DepCurr_L4SS__23" delay="0.0s" duration="20.0s" amplitude="6.131456E-11A"/>

    <network id="network_Thalamocortical" type="networkWithTemperature" temperature="6.3 degC">

        <population id="CG3D_nRT" component="nRT" type="populationList">
            <instance id="0">
                <location x="135.88455" y="-1635.5895" z="-93.3412"/>
            </instance>
            <instance id="1">
                <location x="215.081" y="-1562.1854" z="23.43991"/>
            </instance>
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        </population>

        <population id="CG3D_DeepBask" component="DeepBasket" type="populationList">
            <instance id="0">
                <location x="190.98865" y="-751.1779" z="92.852264"/>
            </instance>
            <instance id="1">
                <location x="-47.617706" y="-1016.4988" z="167.09631"/>
            </instance>
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        </population>

        <population id="CG3D_DeepAxAx" component="DeepAxAx" type="populationList">
            <instance id="0">
                <location x="79.12482" y="-1004.525" z="-55.7034"/>
            </instance>
            <instance id="1">
                <location x="-128.44336" y="-895.7594" z="98.46518"/>
            </instance>
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        </population>

        <population id="CG3D_L5TuftIB" component="L5TuftedPyrIB" type="populationList">
            <instance id="0">
                <location x="-181.46822" y="-791.05396" z="50.370117"/>
            </instance>
            <instance id="1">
                <location x="15.772125" y="-743.831" z="158.30157"/>
            </instance>
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        </population>

        <population id="CG3D_SupBask" component="SupBasket" type="populationList">
            <instance id="0">
                <location x="-105.829834" y="-386.82385" z="51.034546"/>
            </instance>
            <instance id="1">
                <location x="223.72418" y="-217.60205" z="80.4061"/>
            </instance>
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        </population>

        <population id="CG3D_L23PyrRS" component="L23PyrRS" type="populationList">
            <instance id="0">
                <location x="-218.87949" y="-231.30733" z="-40.1969"/>
            </instance>
            <instance id="1">
                <location x="-123.60382" y="-241.4049" z="64.74957"/>
            </instance>
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        </population>

        <population id="CG3D_SupAxAx" component="SupAxAx" type="populationList">
            <instance id="0">
                <location x="-150.20808" y="-291.95404" z="-166.50693"/>
            </instance>
            <instance id="1">
                <location x="38.68866" y="-170.64915" z="219.67188"/>
            </instance>
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        </population>

        <population id="CG3D_L5TuftRS" component="L5TuftedPyrRS" type="populationList">
            <instance id="0">
                <location x="139.2149" y="-805.65857" z="51.003326"/>
            </instance>
            <instance id="1">
                <location x="-52.253937" y="-846.98706" z="220.88501"/>
            </instance>
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        </population>

        <population id="CG3D_DeepLTS" component="DeepLTSInter" type="populationList">
            <instance id="0">
                <location x="-125.65389" y="-905.85657" z="-11.883026"/>
            </instance>
            <instance id="1">
                <location x="-169.19434" y="-715.8437" z="-152.9155"/>
            </instance>
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        </population>

        <population id="CG3D_L6NonTuftRS" component="L6NonTuftedPyrRS" type="populationList">
            <instance id="0">
                <location x="-17.580032" y="-1016.63617" z="207.90872"/>
            </instance>
            <instance id="1">
                <location x="7.9193726" y="-915.1053" z="-175.36386"/>
            </instance>
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        </population>

        <population id="CG3D_L23PyrFRB" component="L23PyrFRB_varInit" type="populationList">
            <instance id="0">
                <location x="-41.37767" y="-222.45537" z="-109.353516"/>
            </instance>
            <instance id="1">
                <location x="94.21716" y="-228.34894" z="185.86145"/>
            </instance>
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        </population>

        <population id="CG3D_TCR" component="TCR" type="populationList">
            <instance id="0">
                <location x="-25.949158" y="-1632.2085" z="229.67874"/>
            </instance>
            <instance id="1">
                <location x="111.93945" y="-1609.5972" z="7.480011"/>
            </instance>
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        </population>

        <population id="CG3D_SupLTS" component="SupLTSInter" type="populationList">
            <instance id="0">
                <location x="-104.74205" y="-191.58937" z="9.96463"/>
            </instance>
            <instance id="1">
                <location x="218.78622" y="-165.00409" z="74.62363"/>
            </instance>
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        </population>

        <population id="CG3D_L4SpinStell" component="L4SpinyStellate" type="populationList">
            <instance id="0">
                <location x="135.8631" y="-537.9688" z="132.25333"/>
            </instance>
            <instance id="1">
                <location x="-103.857635" y="-530.7053" z="79.05069"/>
            </instance>
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        </population>

    </network>

</neuroml>
